*Heading
** Job name: FixNd_Cube_4x_Direct Model name: FixNd_Cube_4x
** Generated by: Abaqus/CAE 6.13-1
*Preprint, echo=NO, model=NO, history=NO, contact=NO
**
** PARTS
**
*Part, name=PART-1
*Node
      1,          2.5,          1.5,          1.5
      2,          2.5,          2.5,          1.5
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*Element, type=DC3D4
321,   1,   2,   3,   4
322,   5,   6,   3,   2
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*Nset, nset=SET-4, generate
   1,  125,    1
*Elset, elset=SET-4, generate
 321,  640,    1
*Nset, nset=ALL, generate
   1,  125,    1
*Nset, nset=CENTRE
 63,
*Nset, nset=CORNER
 125,
** Section: Section-1-SET-4
*Solid Section, elset=SET-4, material=MATERIAL-1
,
*End Part
**
**
** ASSEMBLY
**
*Assembly, name=Assembly
**
*Instance, name=PART-1-1, part=PART-1
*End Instance
**
*End Assembly
**
** MATERIALS
**
*Material, name=MATERIAL-1
*Conductivity
 408.16,
*Density
 8.6098e-09,
*Specific Heat
 5.58e+08,
**
** PREDEFINED FIELDS
**
** Name: Field-1   Type: Temperature
*Initial Conditions, type=TEMPERATURE
PART-1-1.ALL, 200.
** ----------------------------------------------------------------
**
** STEP: Step-1
**
*Step, name=Step-1, nlgeom=NO, inc=30000
*Heat Transfer, end=PERIOD
0.01, 20., , ,
**
** BOUNDARY CONDITIONS
**
** Name: Temp-BC-1 Type: Temperature
*Boundary
PART-1-1.CORNER, 11, 11, 10.
**
** OUTPUT REQUESTS
**
*Restart, write, frequency=0
**
** FIELD OUTPUT: F-Output-1
**
*Output, field, variable=PRESELECT
*Output, history, frequency=0
*End Step
