*HEADING
Input file for ABAQUS of trabecular bone subjected to compression through displacement control.
*PREPRINT, MODEL=NO, HISTORY=NO, ECHO=NO
*NODE, NSET=NALL
1, 0.000000, 0.000000, 0.000000
2, 0.029950, 0.000000, 0.000000
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*NSET, NSET=BOUNDARY
1,2,3,4,
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*ELEMENT, TYPE=C3D8, ELSET=EALL
1, 1, 2, 23, 22, 442, 443, 464, 463
2, 2, 3, 24, 23, 443, 444, 465, 464
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*SOLID SECTION, ELSET=EALL, MATERIAL=BONE
*MATERIAL, NAME=BONE
*ELASTIC
8000.000000, 0.330000
*STEP, NAME=DISP_20, NLGEOM=YES, INC=100
*STATIC
1.000000, 1, 0.001000, 1
*BOUNDARY
1, 1, 1, 0
1, 2, 2, 0
1, 3, 3, 0
2, 1, 1, 0
2, 2, 2, 0
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9261, 3, 3, 0
*RESTART, WRITE, FREQUENCY=0
*OUTPUT, FIELD, TIME INTERVAL=1
*NODE OUTPUT
RF, U, S, E
*ELEMENT OUTPUT, POSITION=INTEGRATION POINTS, DIRECTIONS=YES
LE, S
*OUTPUT, HISTORY, VARIABLE=PRESELECT
*END STEP
